# bcc iron in a 3d periodic box with SOT test terms

clear
units           metal
atom_style      spin

dimension       3
boundary        p p p
atom_modify     map array

lattice         bcc 2.8665
region          box block 0.0 3.0 0.0 3.0 0.0 3.0
create_box      1 box
create_atoms    1 box

mass            1 55.845
set             group all spin/random 31 2.2
velocity        all create 100 4928459 rot yes dist gaussian

pair_style      hybrid/overlay eam/alloy spin/exchange 3.5
pair_coeff      * * eam/alloy Fe_Mishin2006.eam.alloy Fe
pair_coeff      * * spin/exchange exchange 3.4 0.02726 0.2171 1.841

neighbor        0.1 bin
neigh_modify    every 10 check yes delay 20

fix             1 all precession/spin zeeman 0.0 0.0 0.0 1.0 sot/dl 0.010 1.0 0.0 0.0 sot/fl 0.003 1.0 0.0 0.0
fix             2 all langevin/spin 0.0 0.00 21
fix             3 all nve/spin lattice moving

timestep        0.0001

compute         out_mag all spin
compute         out_pe all pe
compute         out_ke all ke
compute         out_temp all temp

variable        emag equal c_out_mag[5]
variable        tmag equal c_out_mag[6]

thermo_style    custom step time v_tmag temp v_emag ke pe etotal
thermo          50

run             200
